*Heading
** Job name: Job-1 Model name: Model-1
** Generated by: Abaqus/CAE 2022
*Preprint, echo=NO, model=NO, history=NO, contact=NO
**
** PARTS
**
*Part, name=Cylinder
*Node
      1,           0.,           0.,          40.
      2,           0.,         -20.,          40.
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*Element, type=C3D4H
   1, 1188, 1189, 1190, 1191
   2, 1188, 1192, 1193, 1189
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*Nset, nset=Wire-2-Set-1
   1,   2,   4,   6,   7,   8
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*Elset, elset=Wire-2-Set-1
   110,   259,   647,   762,   880,  1027
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*Nset, nset=Set-1, generate
    1,  2667,     1
*Elset, elset=Set-1, generate
     1,  13942,      1
*Nset, nset=Wire-1-Set-1
   1,   3,   5,   6,   9,  10
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*Elset, elset=Wire-1-Set-1
    27,   113,   239,   271,   430,   734
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** Section: Section-1
*Solid Section, elset=Set-1, material=Solaris
,
*End Part
**
**
** ASSEMBLY
**
*Assembly, name=Assembly
**
*Instance, name=Cylinder-1, part=Cylinder
*End Instance
**
*Node
      1, -1.2246468e-15,           0.,          40.
*Nset, nset=RP_set
 1,
*Nset, nset=bottom_surface, instance=Cylinder-1
    4,    5,    6,    7,    9,   47
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*Elset, elset=bottom_surface, instance=Cylinder-1
    27,   259,   271,   647,   803,   880
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*Nset, nset=central_line, instance=Cylinder-1
   1,   6,  83,  84,  85,  86
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*Elset, elset=central_line, instance=Cylinder-1
   204,   632,   902,   960,  1028,  1029
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*Nset, nset=surface, instance=Cylinder-1
    1,    2,    3,    4,    5,    6
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*Elset, elset=surface, instance=Cylinder-1
    27,    68,    72,    86,   110,   113
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*Nset, nset=top_surface, instance=Cylinder-1
    1,    2,    3,    8,   10,   11
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*Elset, elset=top_surface, instance=Cylinder-1
   734,   773,  1027,  1304,  1422,  1616
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*Elset, elset=_bottom_surface_S3, internal, instance=Cylinder-1
    27,   259,   803,   880,   928,  1140
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*Elset, elset=_bottom_surface_S4, internal, instance=Cylinder-1
   271,  1179,  2184,  2356,  2619,  2848
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*Elset, elset=_bottom_surface_S2, internal, instance=Cylinder-1
   647,   958,  2191,  2841,  2930,  3262,  3995,  5282,  5324,  5846,  9101, 12213, 12224, 12844
*Elset, elset=_bottom_surface_S1, internal, instance=Cylinder-1
  2391,  2781,  2784,  2794,  4419,  5160,  5219,  9163,  9400, 10010, 12816, 13416
*Surface, type=ELEMENT, name=bottom_surface
_bottom_surface_S3, S3
_bottom_surface_S4, S4
_bottom_surface_S2, S2
_bottom_surface_S1, S1
*Elset, elset=_slave_surface_S3, internal, instance=Cylinder-1
   734,   773,  1027,  1304,  1422,  1616
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*Elset, elset=_slave_surface_S2, internal, instance=Cylinder-1
  1963,  2782,  2992,  3045,  4241,  5033
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*Elset, elset=_slave_surface_S1, internal, instance=Cylinder-1
  1823,  5521,  5909,  6015,  8375,  8643
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*Elset, elset=_slave_surface_S4, internal, instance=Cylinder-1
  3022,  5586,  5721,  5935,  6221,  6391
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*Surface, type=ELEMENT, name=slave_surface
_slave_surface_S3, S3
_slave_surface_S2, S2
_slave_surface_S4, S4
_slave_surface_S1, S1
** Constraint: Constraint_of_top_surface
*Coupling, constraint name=Constraint_of_top_surface, ref node=RP_set, surface=slave_surface
*Kinematic
**
** INTEGRATED OUTPUT SECTIONS
**
*Integrated Output Section, name=I-Section-1, surface=bottom_surface, project orientation=NO
*End Assembly
**
** MATERIALS
**
*Material, name=Solaris
*Density
 9.9e-10,
*Hyperelastic, n=3, ogden
 mu_1, alpha_1, mu_2, alpha_2, mu_3, alpha_3,       0.,       0.
       0.,
**
** BOUNDARY CONDITIONS
**
** Name: BC_of_bottom_surface Type: Displacement/Rotation
*Boundary
bottom_surface, 1, 1
bottom_surface, 2, 2
bottom_surface, 3, 3
bottom_surface, 4, 4
bottom_surface, 5, 5
bottom_surface, 6, 6
** ----------------------------------------------------------------
**
** STEP: Step-1
**
*Step, name=Step-1, nlgeom=YES
*Static
1., 1., 1e-05, 1.
**
** BOUNDARY CONDITIONS
**
** Name: BC_of_RP Type: Displacement/Rotation
*Boundary
RP_set, 1, 1, u1
RP_set, 2, 2, u2
RP_set, 3, 3, u3
RP_set, 4, 4, ur1
RP_set, 5, 5, ur2
RP_set, 6, 6, ur3
**
** OUTPUT REQUESTS
**
*Restart, write, frequency=0
**
** FIELD OUTPUT: F-Output-1
**
*Output, field
*Node Output
CF, RF, U
*Element Output, directions=YES
NFORC, S
**
** HISTORY OUTPUT: H-Output-1
**
*Output, history
*Integrated Output, section=I-Section-1
SOF, SOM
*End Step
